# Лабораторна робота #3 Виконав студент групи ІС-31 Коваль Богдан
# Об'явимо змінні:
k := 11 - 11
α := 0.2*k
β := 0.2*k
# Подані матриці:
A := [3.81, 0.25, 1.28, 0.75; 2.25, 1.32, 4.58, 0.49; 5.31, 6.28, 0.98, 1.04; 9.39, 2.45, 3.35, 2.28]
B := [4.21; 6.47; 3.35; 2.28]
A = [3.81, 0.25, 1.28, 0.75; 2.25, 1.32, 4.58, 0.49; 5.31, 6.28, 0.98, 1.04; 9.39, 2.45, 3.35, 2.28]
B = [4.21; 6.47; 3.35; 2.28]
SumRow_1 := abs(A[0, 1]) + abs(A[0, 2]) + abs(A[0, 3])
(A[0, 0] > SumRow_1) = 1
SumRow_2 := abs(A[1, 0]) + abs(A[1, 2]) + abs(A[1, 3])
(A[1, 1] > SumRow_2) = 0
SumRow_3 := abs(A[2, 0]) + abs(A[2, 1]) + abs(A[2, 3])
(A[2, 2] > SumRow_3) = 0
SumRow_4 := abs(A[3, 0]) + abs(A[3, 1]) + abs(A[3, 2])
(A[3, 3] > SumRow_4) = 0
# На всіх отриманих значення, ми отримали 0. То наша матриця А не має діаг. переваги
RowA1 := A[0, :] = [3.81, 0.25, 1.28, 0.75]
ElB1 := B[0] = 4.21
RowA2 := A[1, :] = [2.25, 1.32, 4.58, 0.49]
ElB2 := B[1] = 6.47
RowA3 := A[2, :] = [5.31, 6.28, 0.98, 1.04]
ElB3 := B[2] = 3.35
RowA4 := A[3, :] = [9.39, 2.45, 3.35, 2.28]
ElB4 := B[3] = 2.28
# Зробимо відповідні перетворення рядків матриці для отримання матриці з діагональною перевагою
Change_RowA1 := RowA1 = [3.81, 0.25, 1.28, 0.75]
Change_RowA2 := RowA2 + 2*RowA3 - RowA4 = [3.48, 11.43, 3.19, 0.29]
Change_RowA3 := RowA3 - RowA1 + 3*RowA2 = [8.25, 9.99, 13.44, 1.76]
Change_RowA4 := RowA4 - 3*RowA1 + RowA2 = [0.21, 3.02, 4.09, 0.52]
3*RowA4 = [28.17, 7.35, 10.05, 6.84]
Change_B1 := ElB1 - ElB2 + ElB3 = 1.09
Change_B2 := 2*ElB2 - 2*ElB3 = 6.24
Change_B3 := 3*ElB3 - ElB4 + ElB1 = 11.98
Change_B4 := 3*ElB4 - ElB1 = 2.63
# З отриманих рядків, створюємо нову матрицю, та вектор.
chg_A := [8.15, 1.38, 3.36, 1.72; 0.3, 2.48, 1.48, 0.36; 0.8, 15.36, 18.33, -2.05; -1.67, 8.33, 0.97, 19.07]
chg_B := [-7.41; -6.48; 44.05; -14.4]
SumRowChg_1 := abs(chg_A[0, 1]) + abs(chg_A[0, 2]) + abs(chg_A[0, 3])
SumRowChg_2 := abs(chg_A[1, 0]) + abs(chg_A[1, 2]) + abs(chg_A[1, 3])
SumRowChg_3 := abs(chg_A[2, 0]) + abs(chg_A[2, 1]) + abs(chg_A[2, 3])
SumRowChg_4 := abs(chg_A[3, 0]) + abs(chg_A[3, 1]) + abs(chg_A[3, 2])
# Перевіряємо на домінантність
(chg_A[0, 0] > SumRowChg_1) = 1
(chg_A[1, 1] > SumRowChg_2) = 1
(chg_A[2, 2] > SumRowChg_3) = 1
(chg_A[3, 3] > SumRowChg_4) = 1
# В отриманій матриці головна діагональ - домінантна
R := lsolve(chg_A, chg_B)  # Розв'язоки з програми
R = [-3.92507; -8.19298; 9.66233; 1.98847]
R_p := [-3.92506734854; -8.19297583997; 9.66233094956; 1.98847210459]
R_z := [-3.92506703375; -8.19297530092; 9.66233069635; 1.98847202595]
# Результати перевірок: вектор нев'язки r = b - Ax
r := chg_B - chg_A*R
# Порівняти результати методом середньоквадратичної похибки
r = [0; -1.77636e-15; -2.13163e-14; 1.24345e-14]
n := 3
δ := sqrt(1/n*sum((R_p[n] - R[n])^2, k = 1 .. n))
δ_1 := sqrt(1/n*sum((R_z[n] - R[n])^2, k = 1 .. n))
δ = 7.49247e-8
δ_1 = 1.53564e-7
